*Heading
** Job name: heat_conduction Model name: Model-1
** Generated by: Abaqus/CAE 2020
*Preprint, echo=NO, model=NO, history=NO, contact=NO
**
** PARTS
**
*Part, name=cylinder_bar
*Node
      1,  0.499070823, 0.0304681994,           0.
      2,  0.449421644,  0.219135076,           0.
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*Element, type=DC3D8
    1,   201,   176,   175,   200,    57,    32,    31,    56
    2,   263,   256,   198,   207,   119,   112,    54,    63
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*Nset, nset=Set-1, generate
     1,  14544,      1
*Elset, elset=Set-1, generate
     1,  12700,      1
** Section: Section-cylinder
*Solid Section, elset=Set-1, material=copper
,
*End Part
**
**
** ASSEMBLY
**
*Assembly, name=Assembly
**
*Instance, name=cylinder_bar-1, part=cylinder_bar
*End Instance
**
*Nset, nset=Set-1, instance=cylinder_bar-1, generate
 14401,  14544,      1
*Elset, elset=Set-1, instance=cylinder_bar-1, generate
 12574,  12700,      1
*Nset, nset=Set-2, instance=cylinder_bar-1, generate
   1,  144,    1
*Elset, elset=Set-2, instance=cylinder_bar-1, generate
   1,  127,    1
*End Assembly
**
** MATERIALS
**
*Material, name=copper
*Conductivity
385.,
** ----------------------------------------------------------------
**
** STEP: heat_conduction
**
*Step, name=heat_conduction, nlgeom=NO
*Heat Transfer, steady state, deltmx=0.
1., 1., 1e-05, 1.,
**
** BOUNDARY CONDITIONS
**
** Name: temp_1 Type: Temperature
*Boundary
Set-1, 11, 11, 400.
** Name: temp_2 Type: Temperature
*Boundary
Set-2, 11, 11, 300.
**
** OUTPUT REQUESTS
**
*Restart, write, frequency=0
**
** FIELD OUTPUT: F-Output-1
**
*Output, field, variable=PRESELECT
*Output, history, frequency=0
*End Step
